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/batch
! Executing MAPDL for /post1 evaluation of command objects only
_wb_post_run = 1
/post1
! ****** Begin Command Snippet ******
!   Commands inserted into this file will be executed immediately after the ANSYS /POST1 command.

!   Active UNIT system in Workbench when this object was created:  Metric (m, kg, N, s, V, A)
!   NOTE:  Any data that requires units (such as mass) is assumed to be in the consistent solver unit system.
!                See Solving Units in the help system for more information.

/POST1
SET,LAST

! 选择所有节点
ALLSEL,ALL

! 打开输出文件
*CFOPEN,node_coordinates_s,csv,'D:/University/竞赛与项目/Challenge-Cup-Unveiling-the-List-and-Taking-the-Lead/data'

! 表头
*VWRITE,'Node,X,Y,Z'
(A)

! 获取节点总数
*GET,NCOUNT,NODE,0,COUNT

! 遍历节点
*DO,I,1,NCOUNT

    ! 获取第 I 个节点编号
    *GET,NID,NODE,0,NUM,MIN

    ! 获取坐标
    *GET,XVAL,NODE,NID,LOC,X
    *GET,YVAL,NODE,NID,LOC,Y
    *GET,ZVAL,NODE,NID,LOC,Z

    ! 写入 CSV
    *VWRITE,NID,XVAL,YVAL,ZVAL
    (F10.0,',',E16.8,',',E16.8,',' ,E16.8)

    ! 删除当前节点选择
    NSEL,U,NODE,,NID

*ENDDO

*CFCLOS

! 恢复所有节点
ALLSEL,ALL


! ****** End   Command Snippet ******
fini
